// SBML level 2 version 4

model main()

  // Compartments:
  compartment e = 1;
  compartment c = 1;

  // Species:
  species ICATP in c = 3.730584/c;  // substance in mole
  species ICglucose in c = 0.196003/c;  // substance in mole
  species ICADP in c = 1.376832/c;  // substance in mole
  species ICG6P in c = 0.716385/c;  // substance in mole
  species $ECglucose in e;
  species ICtreh in c = 63.31204/c;  // substance in mole
  species ICF6P in c = 0.202293/c;  // substance in mole
  species ICG1P in c = 0.064568/c;  // substance in mole
  species ICT6P in c = 0.093705/c;  // substance in mole
  species ICPHOS in c = 10/c;  // substance in mole
  species ICFBP in c = 0.057001/c;  // substance in mole
  species ICGAP in c = 0.006213/c;  // substance in mole
  species ICDHAP in c = 0.048571/c;  // substance in mole
  species ICNADH in c = 0.0106/c;  // substance in mole
  species ICG3P in c = 0.020586/c;  // substance in mole
  species ICNAD in c = 1.5794/c;  // substance in mole
  species ICBPG in c = 0.0001/c;  // substance in mole
  species IC3PG in c = 2.311074/c;  // substance in mole
  species ICglyc in c = 0.1/c;  // substance in mole
  species ECglyc in e = 0;  // substance in mole
  species IC2PG in c = 0.297534/c;  // substance in mole
  species ICPEP in c = 1.171415/c;  // substance in mole
  species ICPYR in c = 0.152195/c;  // substance in mole
  species ICETOH in c = 10/c;  // substance in mole
  species ICACE in c = 0.04/c;  // substance in mole
  species ECETOH in e = 0;  // substance in mole
  species ICAMP in c = 0.431427/c;  // substance in mole
  species ICIMP in c = 0.1/c;  // substance in mole
  species ICINO in c = 0.1/c;  // substance in mole
  species ICHYP in c = 1.5/c;  // substance in mole

  // Parameters:
  p_HXK_Vmax = 0.95;
  p_HXK1_Keq = 3800;
  p_HXK1_Katp = 0.15;
  p_HXK1_Kglc = 0.08;
  p_HXK1_Kadp = 0.23;
  p_HXK1_Kg6p = 30;
  p_HXK1_Kt6p = 0.2;
  p_GLT_VmGLT = 0.734;
  p_GLT_KmGLTGLCi = 1.1918;
  p_GLT_KmGLTGLCo = 1.0078;
  p_NTH1_Vmax = 0.2;
  p_NTH1_Ktre = 2.88;
  p_PGI1_Vmax = 13.4667;
  p_PGI1_Keq = 0.2586;
  p_PGI1_Kg6p = 1.0257;
  p_PGI1_Kf6p = 0.307;
  poly_sinkG6P = 0.0778536;
  km_sinkG6P = 0.01;
  poly_sinkF6P = 0.024574614;
  km_sinkF6P = 0.0001;
  p_PGM1_Vmax = 100;
  p_PGM1_Keq = 0.1666667;
  p_PGM1_Kg1p = 0.023;
  p_PGM1_Kg6p = 0.05;
  p_TPS1_Vmax = 1.4;
  p_TPS1_Kg6p = 3.8;
  p_TPS1_Kudp_glc = 0.886;
  p_TPS1_KmF6P = 1;
  p_TPS2_Vmax = 0.105885;
  p_TPS2_Kt6p = 0.5;
  p_TPS2_Kpi = 0.7023;
  p_PFK_Vmax = 0.71;
  p_PFK_Kf6p = 0.1;
  p_PFK_Katp = 0.71;
  p_PFK_gR = 5.12;
  p_PFK_Catp = 3;
  p_PFK_Ciatp = 100;
  p_PFK_Camp = 0.0845;
  p_PFK_Cf26bp = 0.0174;
  p_PFK_Cf16bp = 0.397;
  p_PFK_L = 0.66;
  p_PFK_Kiatp = 0.65;
  p_PFK_Kamp = 0.095;
  p_PFK_F26BP = 0.001;
  p_PFK_Kf26bp = 0.0012;
  p_PFK_Kf16bp = 0.111;
  p_FBA1_Vmax = 3.15;
  p_FBA1_Keq = 0.069;
  p_FBA1_Kf16bp = 0.451;
  p_FBA1_Kglyceral3p = 2;
  p_FBA1_Kdhap = 2.4;
  p_TPI1_Vmax = 78.396;
  p_TPI1_Keq = 0.0391;
  p_TPI1_Kdhap = 6.45;
  p_TPI1_Kglyceral3p = 5.25;
  poly_sinkGAP = 0.012626;
  p_GPD1_Vmax = 1.169;
  p_GPD1_Keq = 10000;
  p_GPD1_Kdhap = 0.54;
  p_GPD1_Knadh = 0.023;
  p_GPD1_Kglyc3p = 1.2;
  p_GPD1_Knad = 0.93;
  p_GPD1_Kf16bp = 4.8;
  p_GPD1_Katp = 0.73;
  p_GPD1_Kadp = 2;
  p_GAPDH_Vmax = 30.98;
  p_TDH1_Keq = 0.0056;
  p_TDH1_Kglyceral3p = 0.459;
  p_TDH1_Knad = 2.92;
  p_TDH1_Kpi = 1.5;
  p_TDH1_Kglycerate13bp = 0.908;
  p_TDH1_Knadh = 0.022;
  p_PGK_VmPGK = 44.5;
  p_PGK_KeqPGK = 3200;
  p_PGK_KmPGKBPG = 0.003;
  p_PGK_KmPGKADP = 0.2;
  p_PGK_KmPGKP3G = 0.53;
  p_PGK_KmPGKATP = 0.3;
  poly_sinkP3G = 0.007881;
  km_sinkP3G = 0.001;
  p_HOR2_Vmax = 0.5;
  p_HOR2_Kglyc3p = 5.99;
  p_HOR2_Kpi = 1;
  f_GLYCEROL_e = 0.1;
  p_GlycerolTransport = 0.1;
  ECbiomass = 3.7683659;
  p_PGM_Vm = 14.2667;
  p_PGM_Keq = 0.19;
  p_PGM_K3pg = 1.2;
  p_PGM_K2pg = 0.08;
  p_ENO1_Vm = 5.95;
  p_ENO1_Keq = 4.011;
  p_ENO1_K2pg = 0.043;
  p_ENO1_Kpep = 0.5;
  poly_sinkPEP = 0.007607;
  km_sinkPEP = 0.001;
  p_PYK1_Vm = 9.3167;
  p_PYK1_hill = 4;
  p_PYK1_Kpep = 0.281;
  p_PYK1_Kadp = 0.243;
  p_PYK1_Katp = 9.3;
  p_PYK1_Kf16bp = 0.2;
  p_PYK1_L = 60000;
  poly_sinkPYR = 0.1613283;
  km_sinkPYR = 0.001;
  p_ADH_VmADH = 13.5;
  p_ADH_KeqADH = 6.9e-5;
  p_ADH_KiADHNAD = 0.92;
  p_ADH_KmADHETOH = 17;
  p_ADH_KmADHACE = 1.11;
  p_ADH_KmADHNADH = 0.11;
  p_ADH_KiADHETOH = 90;
  p_ADH_KiADHACE = 1.1;
  p_ADH_KiADHNADH = 0.031;
  p_ADH_ExprsCor = 1;
  poly_sinkACE = 0.0348361668;
  km_sinkACE = 0.0001;
  f_ETOH_e = 1e-5;
  p_kETOHtransport = 0.1;
  p_mitoVmax = 1;
  p_mitoADPKm = 0.5;
  p_mitoPiKm = 1;
  p_ATPase_ratio = 0.12;
  p_ADK1_Keq = 0.45;
  p_ADK1_k = 100;
  p_vacuolePi_k = 0.17;
  p_vacuolePi_steadyStatePi = 10;
  p_Amd1_Vmax = 4;
  p_Amd1_K50 = 10.9184;
  p_Amd1_Kpi = 1618.4;
  p_Amd1_Katp = 5000;
  p_Ade13_Ade12_k = 0.05;
  p_Isn1_k = 0.1;
  p_Pnp1_k = 0.03;
  p_Hpt1_k = 0.02;
  p_PDC1_Vmax = 6.4538;
  p_PDC1_Kpyr = 8.5;
  p_PDC1_hill = 1.9;
  p_PDC1_Kpi = 14.7;
  p_mitoNADHVmax = 1;
  p_mitoNADHKm = 0.1;
  flux_ugp = 0.00031;
  D = 0.1;

  // Assignment rules:
  ECglucose := piecewise(0.09436668 + 0.002545204*time^2 + 0.01361121*time + (-0.0001556157*time^3), (time <= 10) && (time >= 0), -0.2793242 + 0.0002180752*time^3 + 0.1257185*time + (-0.008665522*time^2), (time >= 10) && (time <= 15) && ((time > 10) || (time < 0)), 1.154407 + 0.0104509*time^2 + (-0.1610278*time) + (-0.0002067341*time^3), (time >= 15) && (time <= 20) && ((time > 15) || (time < 0)), -1.109248 + 7.622272e-5*time^3 + 0.1785204*time + (-0.006526516*time^2), (time >= 20) && (time <= 30) && ((time > 20) || (time < 0)), 1.081208 + 0.0007750021*time^2 + (-4.905254e-6*time^3) + (-0.0405251*time), (time >= 30) && (time <= 60) && ((time > 30) || (time < 0)), -0.3258071 + 1.608703e-6*time^3 + 0.02982564*time + (-0.0003975102*time^2), (time >= 60) && (time <= 90) && ((time > 60) || (time < 0)), 1.048261 + 0.0001114038*time^2 + (-0.01597662*time) + (-2.761637e-7*time^3), (time >= 90) && (time <= 150) && ((time > 90) || (time < 0)), -0.7932192 + 2.694599e-7*time^3 + 0.02085297*time + (-0.0001341268*time^2), (time >= 150) && (time <= 180) && ((time > 150) || (time < 0)), 1.429341 + 7.166581e-5*time^2 + (-1.116375e-7*time^3) + (-0.0161897*time), (time >= 180) && (time <= 220) && ((time > 180) || (time < 0)), -1.227533 + 1.378811e-7*time^3 + 0.0200404*time + (-9.301646e-5*time^2), (time >= 220) && (time <= 250) && ((time > 220) || (time < 0)), 2.222611 + 7.259042e-5*time^2 + (-0.02136132*time) + (-8.292812e-8*time^3), (time >= 250) && (time <= 300) && ((time > 250) || (time < 0)), -0.7262138 + 0.008126925*time + 2.62876e-8*time^3 + (-2.570373e-5*time^2), (time >= 300) && (time <= 400) && ((time > 300) || (time < 0)), NaN, (time > 400) || (time < 0));

  // Reactions:
  v_HXK: ICATP + ICglucose => ICADP + ICG6P; ICATP*ICglucose*p_HXK_Vmax*p_HXK1_Katp^(-1)*p_HXK1_Kglc^(-1)*(1 + ICADP*p_HXK1_Kadp^(-1) + ICATP*p_HXK1_Katp^(-1))^(-1)*(1 + ICATP*p_HXK1_Kg6p^(-1) + ICT6P*p_HXK1_Kt6p^(-1) + ICglucose*p_HXK1_Kglc^(-1))^(-1)*(1 + (-1*ICADP*ICglucose^(-1)*p_HXK1_Keq^(-1)));  // modifiers: ICT6P
  v_GLT: $ECglucose => ICglucose; p_GLT_VmGLT*p_GLT_KmGLTGLCo^(-2)*(1 + ECglucose*p_GLT_KmGLTGLCo^(-1) + ICglucose*p_GLT_KmGLTGLCi^(-1) + 0.91*ECglucose*ICglucose*p_GLT_KmGLTGLCi^(-1)*p_GLT_KmGLTGLCo^(-1))^(-1)*(ECglucose + (-1*ICglucose));
  v_NTH1: ICtreh => 2 ICglucose; ICtreh*p_NTH1_Vmax*p_NTH1_Ktre^(-1)*(1 + ICtreh*p_NTH1_Ktre^(-1))^(-1);
  v_PGI: ICG6P => ICF6P; ICG6P*p_PGI1_Vmax*p_PGI1_Kg6p^(-1)*(1 + ICF6P*p_PGI1_Kf6p^(-1) + ICG6P*p_PGI1_Kg6p^(-1))^(-1)*(1 + (-1*ICF6P*ICG6P^(-1)*p_PGI1_Keq^(-1)));
  v_sinkG6P: ICG6P => ICPHOS; ICG6P*poly_sinkG6P*(ICG6P + km_sinkG6P)^(-1);
  v_sinkf6P: ICPHOS => ICF6P; ICF6P*poly_sinkF6P*(ICF6P + km_sinkF6P)^(-1);
  v_PGM1: ICG1P => ICG6P; ICG1P*p_PGM1_Vmax*p_PGM1_Kg1p^(-1)*(1 + ICG1P*p_PGM1_Kg1p^(-1) + ICG6P*p_PGM1_Kg6p^(-1))^(-1)*(1 + (-1*ICG6P*ICG1P^(-1)*p_PGM1_Keq^(-1)));
  v_TPS1: ICG6P + ICG1P + ICATP => ICT6P + ICADP + 2 ICPHOS; ICG1P*ICG6P*p_TPS1_Vmax*p_TPS1_Kg6p^(-1)*p_TPS1_Kudp_glc^(-1)*(1 + ICG1P*p_TPS1_Kudp_glc^(-1))^(-1)*(1 + ICG6P*p_TPS1_Kg6p^(-1))^(-1)*(1 + ICF6P*p_TPS1_KmF6P^(-1));  // modifiers: ICF6P
  v_TPS2: ICT6P => ICtreh + ICPHOS; ICPHOS*ICT6P*p_TPS2_Vmax*(p_TPS2_Kpi*p_TPS2_Kt6p + ICPHOS*ICT6P*p_TPS2_Kt6p)^(-1);
  v_PFK: ICF6P + ICATP => ICFBP + ICADP; ICATP*ICF6P*p_PFK_Vmax*p_PFK_gR*p_PFK_Katp^(-1)*p_PFK_Kf6p^(-1)*((1 + ICATP*ICF6P*p_PFK_Katp^(-1)*p_PFK_Kf6p^(-1) + ICATP*ICF6P*p_PFK_gR*p_PFK_Katp^(-1)*p_PFK_Kf6p^(-1))^2 + p_PFK_Kamp*p_PFK_L*ICAMP^(-1)*(1 + ICATP*p_PFK_Kiatp^(-1))^(-1)*(1 + ICATP*p_PFK_Catp*p_PFK_Katp^(-1))^2*(1 + ICFBP*p_PFK_Kf16bp^(-1) + p_PFK_F26BP*p_PFK_Kf26bp^(-1))^(-1)*(1 + ICAMP*p_PFK_Camp*p_PFK_Kamp^(-1))*(1 + ICATP*p_PFK_Ciatp*p_PFK_Kiatp^(-1))*(1 + ICFBP*p_PFK_Cf16bp*p_PFK_Kf16bp^(-1) + p_PFK_Cf26bp*p_PFK_F26BP*p_PFK_Kf26bp^(-1)))^(-1)*(1 + ICATP*ICF6P*p_PFK_Katp^(-1)*p_PFK_Kf6p^(-1) + ICATP*ICF6P*p_PFK_gR*p_PFK_Katp^(-1)*p_PFK_Kf6p^(-1));  // modifiers: ICAMP
  v_ALD: ICFBP => ICGAP + ICDHAP; p_FBA1_Vmax*p_FBA1_Kf16bp^(-1)*(ICFBP*p_FBA1_Kf16bp^(-1) + (1 + ICDHAP*p_FBA1_Kdhap^(-1))*(1 + ICGAP*p_FBA1_Kglyceral3p^(-1)))^(-1)*(ICFBP + (-1*ICDHAP*ICGAP*p_FBA1_Keq^(-1)));
  v_TPI1: ICDHAP => ICGAP; ICDHAP*p_TPI1_Vmax*p_TPI1_Kdhap^(-1)*(1 + ICDHAP*p_TPI1_Kdhap^(-1) + ICGAP*p_TPI1_Kglyceral3p^(-1))^(-1)*(1 + (-1*ICGAP*ICDHAP^(-1)*p_TPI1_Keq^(-1)));
  v_sinkGAP: ICPHOS => ICGAP; ICGAP*poly_sinkGAP*(ICGAP + poly_sinkGAP)^(-1);
  v_3GPDH: ICDHAP + ICNADH => ICG3P + ICNAD; p_GPD1_Vmax*p_GPD1_Kdhap^(-1)*p_GPD1_Knadh^(-1)*(1 + ICDHAP*p_GPD1_Kdhap^(-1) + ICG3P*p_GPD1_Kglyc3p^(-1))^(-1)*(1 + ICNAD*p_GPD1_Knad^(-1) + ICNADH*p_GPD1_Knadh^(-1))^(-1)*(1 + ICADP*p_GPD1_Kadp^(-1) + ICATP*p_GPD1_Katp^(-1) + ICFBP*p_GPD1_Kf16bp^(-1))^(-1)*(ICDHAP*ICNADH + (-1*ICG3P*ICNAD*p_GPD1_Keq^(-1)));  // modifiers: ICFBP, ICATP, ICADP
  v_GAPDH: ICGAP + ICNAD + ICPHOS => ICBPG + ICNADH; p_GAPDH_Vmax*p_TDH1_Kglyceral3p^(-1)*p_TDH1_Knad^(-1)*p_TDH1_Kpi^(-1)*(-1 + (1 + ICBPG*p_TDH1_Kglycerate13bp^(-1))*(1 + ICNADH*p_TDH1_Knadh^(-1)) + (1 + ICGAP*p_TDH1_Kglyceral3p^(-1))*(1 + ICNAD*p_TDH1_Knad^(-1))*(1 + ICPHOS*p_TDH1_Kpi^(-1)))^(-1)*(ICGAP*ICNAD*ICPHOS + (-1*ICBPG*ICNADH*p_TDH1_Keq^(-1)));
  v_PGK: ICBPG + ICADP => IC3PG + ICATP; ICADP*ICBPG*p_PGK_VmPGK*p_PGK_KmPGKADP^(-1)*p_PGK_KmPGKBPG^(-1)*(1 + IC3PG*p_PGK_KmPGKP3G^(-1) + ICBPG*p_PGK_KmPGKBPG^(-1))^(-1)*(1 + ICADP*p_PGK_KmPGKADP^(-1) + ICATP*p_PGK_KmPGKATP^(-1))^(-1)*(1 + (-1*IC3PG*ICATP*ICADP^(-1)*ICBPG^(-1)*p_PGK_KeqPGK^(-1)));
  v_sink3PGA: IC3PG => ICPHOS; IC3PG*poly_sinkP3G*(IC3PG + km_sinkP3G)^(-1);
  v_HOR2: ICG3P => ICglyc + ICPHOS; ICG3P*p_HOR2_Vmax*p_HOR2_Kglyc3p^(-1)*(1 + ICG3P*p_HOR2_Kglyc3p^(-1))^(-1)*(1 + ICPHOS*p_HOR2_Kpi^(-1))^(-1);
  v_GlycT_IC: ICglyc => ; p_GlycerolTransport*(ICglyc + (-1*f_GLYCEROL_e));
  v_GlycT_EC: => ECglyc; 0.002*ECbiomass*p_GlycerolTransport*(ICglyc + (-1*f_GLYCEROL_e));  // modifiers: ICglyc
  v_PGM: IC3PG => IC2PG; IC3PG*p_PGM_Vm*p_PGM_K3pg^(-1)*(1 + IC2PG*p_PGM_K2pg^(-1) + IC3PG*p_PGM_K3pg^(-1))^(-1)*(1 + (-1*IC2PG*IC3PG^(-1)*p_PGM_Keq^(-1)));
  v_ENO2: IC2PG => ICPEP; IC2PG*p_ENO1_Vm*p_ENO1_K2pg^(-1)*(1 + IC2PG*p_ENO1_K2pg^(-1) + ICPEP*p_ENO1_Kpep^(-1))^(-1)*(1 + (-1*ICPEP*IC2PG^(-1)*p_ENO1_Keq^(-1)));
  v_sinkPEP: ICPEP => ICPHOS; ICPEP*poly_sinkPEP*(ICPEP + km_sinkPEP)^(-1);
  v_PYK1: ICPEP + ICADP => ICPYR + ICATP; ICADP*ICPEP*p_PYK1_Vm*p_PYK1_Kadp^(-1)*p_PYK1_Kpep^(-1)*((1 + ICPEP*p_PYK1_Kpep^(-1))^p_PYK1_hill + p_PYK1_L*((1 + ICFBP*p_PYK1_Kf16bp^(-1))^(-1)*(1 + ICATP*p_PYK1_Katp^(-1)))^p_PYK1_hill*(1 + ICPEP*p_PYK1_Kpep^(-1))^(-1 + p_PYK1_hill)*(1 + ICADP*p_PYK1_Kadp^(-1))*(1 + ICPEP*p_PYK1_Kpep^(-1)))^(-1);  // modifiers: ICFBP
  v_sinkPYR: ICPYR => ; ICPYR*poly_sinkPYR*(ICPYR + km_sinkPYR)^(-1);
  v_ADH: ICNADH + ICACE => ICNAD + ICETOH; -1*p_ADH_ExprsCor*p_ADH_VmADH*p_ADH_KeqADH^(-1)*p_ADH_KiADHNAD^(-1)*p_ADH_KmADHETOH^(-1)*(1 + ICETOH*p_ADH_KmADHETOH^(-1) + ICNAD*p_ADH_KiADHNAD^(-1) + ICNADH*p_ADH_KiADHNADH^(-1) + ICACE*ICNADH*p_ADH_KiADHNADH^(-1)*p_ADH_KmADHACE^(-1) + ICACE*p_ADH_KmADHNADH*p_ADH_KiADHNAD^(-1)*p_ADH_KmADHACE^(-1) + ICETOH*ICNAD*p_ADH_KiADHNAD^(-1)*p_ADH_KmADHETOH^(-1) + ICETOH*ICNADH*p_ADH_KiADHNADH^(-1)*p_ADH_KmADHETOH^(-1) + ICACE*ICETOH*ICNAD*p_ADH_KiADHACE^(-1)*p_ADH_KiADHNAD^(-1)*p_ADH_KmADHETOH^(-1) + ICACE*ICETOH*ICNADH*p_ADH_KiADHNAD^(-1)*p_ADH_KiADHNADH^(-1)*p_ADH_KmADHETOH^(-1) + ICACE*ICNAD*p_ADH_KmADHNADH*p_ADH_KiADHNAD^(-1)*p_ADH_KiADHNADH^(-1)*p_ADH_KmADHACE^(-1))^(-1)*(ICETOH*ICNAD + (-1*ICACE*ICNADH));
  v_sinkACE: ICACE => ; ICACE*poly_sinkACE*(ICACE + km_sinkACE)^(-1);
  v_ETOHT_IC: ICETOH => ; p_kETOHtransport*(ICETOH + (-1*f_ETOH_e));
  v_ETOHT_EC: => ECETOH; 0.002*ECbiomass*p_kETOHtransport*(ICETOH + (-1*f_ETOH_e));  // modifiers: ICETOH
  v_ATPMITO: ICPHOS + ICADP => ICATP; ICADP*ICPHOS*p_mitoVmax*p_mitoADPKm^(-1)*p_mitoPiKm^(-1)*(1 + ICADP*p_mitoADPKm^(-1))^(-1)*(1 + ICPHOS*p_mitoPiKm^(-1))^(-1);
  v_ATPASE: ICATP => ICPHOS + ICADP; ICATP*p_ATPase_ratio*ICADP^(-1);
  v_ADK: 2 ICADP => ICATP + ICAMP; p_ADK1_k*(ICADP^2 + (-1*ICAMP*ICATP*p_ADK1_Keq^(-1)));
  v_VACPI: => ICPHOS; p_vacuolePi_k*(p_vacuolePi_steadyStatePi + (-1*ICPHOS));
  v_AMD1: ICAMP => ICIMP; ICAMP*p_Amd1_Vmax*(ICAMP + p_Amd1_K50*p_Amd1_Katp*ICATP^(-1)*(1 + ICPHOS*p_Amd1_Kpi^(-1)))^(-1);  // modifiers: ICATP, ICPHOS
  v_ADE1312: ICIMP => ICAMP; ICIMP*p_Ade13_Ade12_k;
  v_ISN1: ICIMP => ICPHOS + ICINO; ICIMP*p_Isn1_k;
  v_PNP1: ICINO => ICHYP; ICINO*p_Pnp1_k;
  v_HPT1: ICPHOS + ICHYP => ICIMP; ICHYP*p_Hpt1_k;
  v_PDC: ICPYR => ICACE; p_PDC1_Vmax*(ICPYR*p_PDC1_Kpyr^(-1))^p_PDC1_hill*(1 + (ICPYR*p_PDC1_Kpyr^(-1))^p_PDC1_hill + ICPHOS*p_PDC1_Kpi^(-1))^(-1);  // modifiers: ICPHOS
  v_MITONADH: ICNADH => ICNAD; ICNADH*p_mitoNADHVmax*(ICNADH + p_mitoNADHKm)^(-1);
  v_UGP: ICG1P => ; flux_ugp;
  v_TRANSPORT: ECETOH + ECglyc => ; 1/3600*D*ECETOH;
end
